*Heading
** Job name: strip Model name: Model-1
** Generated by: Abaqus/CAE 2021
*Preprint, echo=NO, model=NO, history=NO, contact=NO
**
** PARTS
**
*Part, name=Part-1
*Node
      1,           0.,   9.60000038
      2,           0.,   9.19999981
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*Element, type=CPE3
   1,  913,  626,    1
   2,  810,  729,  626
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*Nset, nset=Set-1, generate
    1,  2678,     1
*Elset, elset=Set-1, generate
    1,  5154,     1
*Nset, nset=ALL, generate
    1,  2678,     1
*Elset, elset=ALL, generate
    1,  5154,     1
*Nset, nset=EDGE
   1,   2,   3,   4,   5,   6
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*Elset, elset=EDGE
    1,    4,    5,    6,    8,   11
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** Section: Section-1
*Solid Section, elset=Set-1, material=Material-1
,
*End Part
**
**
** ASSEMBLY
**
*Assembly, name=Assembly
**
*Instance, name=Part-1-1, part=Part-1
*End Instance
**
*Nset, nset=EDGE, instance=Part-1-1, generate
    1,  2678,     1
*Elset, elset=EDGE, instance=Part-1-1, generate
    1,  5154,     1
*Nset, nset=Set-1, instance=Part-1-1
  83,  84,  85,  86,  87, 714, 715, 716, 717, 718, 719
*Elset, elset=Set-1, instance=Part-1-1
   39,  604,  670, 1245, 1258, 1428, 1498, 1509, 1591, 1593
*Nset, nset=Set-2, instance=Part-1-1
   1,   2,   3,   4,   5,   6
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*Elset, elset=Set-2, instance=Part-1-1
    1,   41,   65,   93,   94,   95
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*Nset, nset=Set-3, instance=Part-1-1
  25,  26,  27,  28,  29,  30
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*Elset, elset=Set-3, instance=Part-1-1
   90,  157,  179,  200,  220,  239
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*End Assembly
**
** MATERIALS
**
*Material, name=Material-1
*Density
1.,
*Elastic
5000., 0.3
**
** BOUNDARY CONDITIONS
**
** Name: BC-2 Type: Displacement/Rotation
*Boundary
Set-2, 1, 1
** Name: BC-3 Type: Displacement/Rotation
*Boundary
Set-3, 1, 1
Set-3, 2, 2
** ----------------------------------------------------------------
**
** STEP: Step-1
**
*Step, name=Step-1, nlgeom=NO
*Static
1., 1., 1e-05, 1.
**
** BOUNDARY CONDITIONS
**
** Name: BC-1 Type: Displacement/Rotation
*Boundary
Set-1, 1, 1
Set-1, 2, 2, -1.
**
** OUTPUT REQUESTS
**
*Restart, write, frequency=0
**
** FIELD OUTPUT: F-Output-1
**
*Output, field
*Node Output
COORD, U
*Element Output, directions=YES
S,
**
** FIELD OUTPUT: F-Output-2
**
*Node Output, nset=Part-1-1.ALL
COORD, U
*Element Output, elset=Part-1-1.ALL, directions=YES
S,
**
** HISTORY OUTPUT: H-Output-1
**
*Output, history, variable=PRESELECT
*End Step
